<?xml version="1.0"?>
<propeller name="prop">
  <ixx>14.07</ixx>
  <diameter unit="IN"> 102.0 </diameter>
  <numblades>2</numblades>
  <gearratio>1.04</gearratio>
  <p_factor>8.06</p_factor>
  <minpitch>12</minpitch>
  <maxpitch> 45 </maxpitch>
  <minrpm>1600</minrpm>
  <maxrpm>2300</maxrpm>

 <!-- thrust coefficient as a function of advance ratio and blade angle -->
  <table name="C_THRUST" type="internal">
      <tableData>
                -10        0         15        25        35        45        55        65       90
      -0.2      -0.0381    0.0215    0.0780    0.0956    0.1054    0.1112    0.1025    0.0878   0.0000
       0.0      -0.0566    0.0000    0.0780    0.0956    0.1054    0.1122    0.1049    0.0878   0.0000
       0.2      -0.0635   -0.0195    0.0674    0.0937    0.1039    0.1122    0.1049    0.0878   0.0000
       0.4      -0.0635   -0.0453    0.0507    0.0927    0.1019    0.1112    0.1049    0.0878   0.0000
       0.6      -0.0635   -0.0635    0.0268    0.0834    0.0976    0.1083    0.1034    0.0878   0.0000
       0.8      -0.0635   -0.0635    0.0015    0.0624    0.0947    0.1044    0.1034    0.0878   0.0000
       1.0      -0.0635   -0.0635   -0.0254    0.0381    0.0908    0.0990    0.1025    0.0878   0.0000
       1.2      -0.0635   -0.0635   -0.0522    0.0117    0.0746    0.0956    0.1025    0.0878   0.0000
       1.4      -0.0635   -0.0635   -0.0635   -0.0171    0.0537    0.0941    0.1005    0.0878   0.0000
       1.6      -0.0635   -0.0635   -0.0635   -0.0434    0.0293    0.0908    0.0986    0.0878   0.0000
       1.8      -0.0635   -0.0635   -0.0635   -0.0635    0.0049    0.0780    0.0956    0.0878   0.0000
       2.0      -0.0635   -0.0635   -0.0635   -0.0635   -0.0195    0.0610    0.0952    0.0878   0.0000
       2.2      -0.0635   -0.0635   -0.0635   -0.0635   -0.0439    0.0439    0.0937    0.0878   0.0000
       2.4      -0.0635   -0.0635   -0.0635   -0.0635   -0.0635    0.0234    0.0765    0.0878   0.0000
       2.6      -0.0635   -0.0635   -0.0635   -0.0635   -0.0635    0.0030    0.0484    0.0780   0.0000
       2.8      -0.0635   -0.0635   -0.0635   -0.0635   -0.0635   -0.0176    0.0317    0.0635   0.0000
       3.0      -0.0635   -0.0635   -0.0635   -0.0635   -0.0635   -0.0381    0.0166    0.0488   0.0000
       3.2      -0.0635   -0.0635   -0.0635   -0.0635   -0.0635   -0.0585    0.0015    0.0342   0.0000
       3.4      -0.0635   -0.0635   -0.0635   -0.0635   -0.0635   -0.0635   -0.0137    0.0195   0.0000
       3.6      -0.0635   -0.0635   -0.0635   -0.0635   -0.0635   -0.0635   -0.0288    0.0049   0.0000
       3.8      -0.0635   -0.0635   -0.0635   -0.0635   -0.0635   -0.0635   -0.0439   -0.0098   0.0000
       4.0      -0.0635   -0.0635   -0.0635   -0.0635   -0.0635   -0.0635   -0.0590   -0.0244   0.0000
       6.0      -0.0635   -0.0635   -0.0635   -0.0635   -0.0635   -0.0635   -0.0635   -0.0635   0.0000
      </tableData>
  </table>

 <!-- power coefficient as a function of advance ratio and blade angle -->
  <table name="C_POWER" type="internal">
     <tableData>
               -10        0        15        25        35        45        55        65       90
      -0.2      0.0056   0.0112    0.0391    0.0888    0.1531    0.2177    0.2512    0.2780   0.2780
       0.0      0.0223   0.0056    0.0335    0.0827    0.1464    0.2177    0.2522    0.2780   0.2780
       0.2      0.0318   0.0089    0.0324    0.0770    0.1400    0.2177    0.2522    0.2780   0.2780
       0.4      0.0429   0.0195    0.0279    0.0710    0.1330    0.2177    0.2522    0.2780   0.2780
       0.6      0.0526   0.0296    0.0184    0.0660    0.1246    0.2134    0.2512    0.2780   0.2780
       0.8      0.0620   0.0396    0.0056    0.0559    0.1172    0.2037    0.2512    0.2780   0.2780
       1.0      0.0713   0.0492    0.0056    0.0392    0.1105    0.1933    0.2502    0.2780   0.2780
       1.2      0.0811   0.0394   -0.0184    0.0151    0.0978    0.1852    0.2486    0.2780   0.2780
       1.4      0.0904   0.0680   -0.0278   -0.0112    0.0754    0.1826    0.2455    0.2780   0.2780
       1.6      0.0998   0.0777   -0.0325   -0.0335    0.0476    0.1775    0.2402    0.2680   0.2780
       1.8      0.1095   0.0871   -0.0335   -0.0559    0.0140    0.1574    0.2328    0.2623   0.2780
       2.0      0.1189   0.0965   -0.0429   -0.0780   -0.0167    0.1340    0.2218    0.2569   0.2780
       2.2      0.1283   0.1062   -0.0526   -0.1005   -0.0502    0.1089    0.2151    0.2455   0.2780
       2.4      0.1380   0.1156   -0.0620   -0.1229   -0.0837    0.0777    0.2087    0.2402   0.2780
       2.6      0.1474   0.1249   -0.0713   -0.1450   -0.1062    0.0325    0.2037    0.2318   0.2780
       2.8      0.1568   0.1347   -0.0811   -0.1675   -0.1273   -0.0111    0.1993    0.2288   0.2780
       3.0      0.1665   0.1440   -0.0904   -0.1899   -0.1507   -0.0502    0.1926    0.2288   0.2780
       3.2      0.1759   0.1534   -0.0998   -0.2120   -0.1732   -0.0894    0.1802    0.2234   0.2780
       3.4      0.1852   0.1631   -0.1095   -0.2345   -0.1953   -0.1283    0.1397    0.2177   0.2780
       3.6      0.1950   0.1725   -0.1189   -0.2569   -0.2177   -0.1675    0.0981    0.2120   0.2780
       3.8      0.2043   0.1819   -0.1283   -0.2780   -0.2402   -0.2067    0.0546    0.2053   0.2780
       4.0      0.2137   0.1916   -0.1380   -0.2780   -0.2780   -0.2455    0.0111    0.1899   0.2780
       6.0      0.2780   0.2780   -0.2780   -0.2780   -0.2780   -0.2780   -0.2780   -0.1675   0.2780
     </tableData>
  </table>

<!-- thrust effects of helical tip Mach -->
<table name="CT_MACH" type="internal">
  <tableData>
    0.85   1.0
    1.05   0.8
  </tableData>
</table>

<!-- power-required effects of helical tip Mach -->
<table name="CP_MACH" type="internal">
  <tableData>
    0.85   1.0
    1.05   1.8
    2.00   1.4
  </tableData>
</table>

</propeller>
